# Diseño de fundaciones
# MURO: F2X
σ_suelo := 8 kgf/cm^2
# 1. Dimensiones elementos
# Propiedades y esfuerzos de muro: | Dimensiones zapata:
L_muro := 1.92 m
L_zap := 110 cm + L_muro + 110 cm = 4.12 m
e_muro := 25 cm
B_zap := 120 cm
γ_H := 2.5 tonnef/m^3
H_zap := 210 cm
N_zap := γ_H*B_zap*L_zap*H_zap = 25.956 tonnef
# 2. Esfuerzos de ETABS
N_PP := -208.0582 tonnef
M_PP := -2.228 tonnef*m
N_SC := -57.1306 tonnef
M_SC := -0.4581 tonnef*m
N_SX := 135.3621 tonnef
M_SX := 0.1446 tonnef*m
N_SY := 71.5593 tonnef
M_SY := 0.2382 tonnef*m
# 3. Combinaciones
# 3.1. Combinaciones estáticas
# Combinación 1 (PP)
N_est1 := N_zap + |N_PP| = 234.014 tonnef
M_est1 := M_PP = -2.228 tonnef*m
l := L_zap/6 = 0.686667 m
e := |M_est1/N_est1| = 0.00952079 m
L' := 3*(L_zap/2 - e) = 6.15144 m
σ_est1 :=
    if e < l
        max(N_est1/(B_zap*L_zap) + 6*M_est1/(B_zap*L_zap^2), N_est1/(B_zap*L_zap) - 6*M_est1/(B_zap*L_zap^2))
    else if e == l
        2*N_est1/(B_zap*L_zap)
    else
        2*N_est1/(B_zap*L')
    = 4.79893 kgf/cm^2
# Combinación 2 (PP+SC)
N_est2 := N_zap + |N_PP| + |N_SC| = 291.145 tonnef
M_est2 := M_PP + M_SC = -2.6861 tonnef*m
l := L_zap/6 = 0.686667 m
e := |M_est1/N_est1| = 0.00952079 m
L' := 3*(L_zap/2 - e) = 6.15144 m
σ_est2 :=
    if e < l
        max(N_est2/(B_zap*L_zap) + 6*M_est2/(B_zap*L_zap^2), N_est2/(B_zap*L_zap) - 6*M_est2/(B_zap*L_zap^2))
    else if e == l
        2*N_est2/(B_zap*L_zap)
    else
        2*N_est2/(B_zap*L')
    = 5.96797 kgf/cm^2
σ_est := max(σ_est1, σ_est2) = 5.96797 kgf/cm^2
# 3.2. Combinaciones sísmicas
# Combinación 3,1 (PP+SX)
N_sis := N_zap + |N_PP| + N_SX = 369.376 tonnef
M_sis := M_PP + M_SX = -2.0834 tonnef*m
l := L_zap/6 = 0.686667 m
e := |M_sis/N_sis| = 0.00564032 m
L' := 3*(L_zap/2 - e) = 6.16308 m
σ_sis31 :=
    if e < l
        max(N_sis/(B_zap*L_zap) + 6*M_sis/(B_zap*L_zap^2), N_sis/(B_zap*L_zap) - 6*M_sis/(B_zap*L_zap^2))
    else if e == l
        2*N_sis/(B_zap*L_zap)
    else
        2*N_sis/(B_zap*L')
    = 7.53257 kgf/cm^2
# Combinación 3,2 (PP-SX)
N_sis := N_zap + |N_PP| - N_SX = 98.6521 tonnef
M_sis := M_PP - M_SX = -2.3726 tonnef*m
l := L_zap/6 = 0.686667 m
e := |M_sis/N_sis| = 0.0240502 m
L' := 3*(L_zap/2 - e) = 6.10785 m
σ_sis32 :=
    if e < l
        max(N_sis/(B_zap*L_zap) + 6*M_sis/(B_zap*L_zap^2), N_sis/(B_zap*L_zap) - 6*M_sis/(B_zap*L_zap^2))
    else if e == l
        2*N_sis/(B_zap*L_zap)
    else
        2*N_sis/(B_zap*L')
    = 2.06528 kgf/cm^2
# Combinación 4,1 (PP+0.75(SC+S))
N_sis := N_zap + |N_PP| + 0.75*|N_SC| + 0.75*N_SX = 378.384 tonnef
M_sis := M_PP + 0.75*M_SC + 0.75*M_SX = -2.46313 tonnef*m
l := L_zap/6 = 0.686667 m
e := |M_sis/N_sis| = 0.0065096 m
L' := 3*(L_zap/2 - e) = 6.16047 m
σ_sis41 :=
    if e < l
        max(N_sis/(B_zap*L_zap) + 6*M_sis/(B_zap*L_zap^2), N_sis/(B_zap*L_zap) - 6*M_sis/(B_zap*L_zap^2))
    else if e == l
        2*N_sis/(B_zap*L_zap)
    else
        2*N_sis/(B_zap*L')
    = 7.72595 kgf/cm^2
# Combinación 4,2 (PP+0.75(SC-S))
N_sis := N_zap + |N_PP| + 0.75*|N_SC| - 0.75*N_SX = 175.341 tonnef
M_sis := M_PP + 0.75*M_SC - 0.75*M_SX = -2.68003 tonnef*m
l := L_zap/6 = 0.686667 m
e := |M_sis/N_sis| = 0.0152847 m
L' := 3*(L_zap/2 - e) = 6.13415 m
σ_sis42 :=
    if e < l
        max(N_sis/(B_zap*L_zap) + 6*M_sis/(B_zap*L_zap^2), N_sis/(B_zap*L_zap) - 6*M_sis/(B_zap*L_zap^2))
    else if e == l
        2*N_sis/(B_zap*L_zap)
    else
        2*N_sis/(B_zap*L')
    = 3.62548 kgf/cm^2
# Combinación 5,1 (0.6PP+SX)
N_sis := 0.6*N_zap + 0.6*|N_PP| + N_SX = 275.771 tonnef
M_sis := 0.6*M_PP + M_SX = -1.1922 tonnef*m
l := L_zap/6 = 0.686667 m
e := |M_sis/N_sis| = 0.00432316 m
L' := 3*(L_zap/2 - e) = 6.16703 m
σ_sis51 :=
    if e < l
        max(N_sis/(B_zap*L_zap) + 6*M_sis/(B_zap*L_zap^2), N_sis/(B_zap*L_zap) - 6*M_sis/(B_zap*L_zap^2))
    else if e == l
        2*N_sis/(B_zap*L_zap)
    else
        2*N_sis/(B_zap*L')
    = 5.613 kgf/cm^2
# Combinación 5,2 (0.6PP-SX)
N_sis := 0.6*N_zap + 0.6*|N_PP| - N_SX = 5.04642 tonnef
M_sis := 0.6*M_PP - M_SX = -1.4814 tonnef*m
l := L_zap/6 = 0.686667 m
e := |M_sis/N_sis| = 0.293555 m
L' := 3*(L_zap/2 - e) = 5.29934 m
σ_sis52 :=
    if e < l
        max(N_sis/(B_zap*L_zap) + 6*M_sis/(B_zap*L_zap^2), N_sis/(B_zap*L_zap) - 6*M_sis/(B_zap*L_zap^2))
    else if e == l
        2*N_sis/(B_zap*L_zap)
    else
        2*N_sis/(B_zap*L')
    = 0.145708 kgf/cm^2
σ_sis := max(σ_sis31, σ_sis32, σ_sis41, σ_sis42, σ_sis51, σ_sis52) = 7.72595 kgf/cm^2
# 4. Chequeo parrilla
# Momento lado corto | Momento Lado Largo
M1 := σ_sis*(B_zap/2)^2*1 m/2 = 13.9067 tonnef*m
M2 := σ_sis*((L_zap - L_muro)/2)^2*1 m/2 = 46.742 tonnef*m
# Propiedad de la Sección de Zapata | Propiedad de la Sección de Zapata
W := 1/6*1 m*H_zap^2 = 0.735 m^3
W := 1/6*1 m*H_zap^2 = 0.735 m^3
M1/W = 1.89207 kgf/cm^2
M2/W = 6.35945 kgf/cm^2
if M1/W < 7 kgf/cm^2
    "No necesita parrilla"
else
    "Necesita Parrilla"
= "No necesita parrilla"
if M2/W < 7 kgf/cm^2
    "No necesita parrilla"
else
    "Necesita Parrilla"
= "No necesita parrilla"
